# OpenSim document version 40000
AnalyzeTool 3DGaitModel2354:
  model_file: /content/opensim-models/Pipelines/Gait2354_Simbody/OutputReference/subject01_simbody.osim
  replace_force_set: false
  results_directory: ResultsSO
  output_precision: 8
  initial_time: 0
  final_time: 2.5
  solve_for_equilibrium_for_auxiliary_states: false
  maximum_number_of_integrator_steps: 20000
  maximum_integrator_step_size: 1
  minimum_integrator_step_size: 1e-8
  integrator_error_tolerance: 1e-5
  external_loads_file: subject01_walk1_grf.xml
  coordinates_file: subject01_walk1_ik.mot
  lowpass_cutoff_frequency_for_coordinates: -1
  AnalysisSet Analyses:
    StaticOptimization: start_time=0 end_time=2.5 step_interval=1 in_degrees=true use_model_force_set=true
        activation_exponent=2 use_muscle_physiology=true optimizer_convergence_criterion=0.0001
        optimizer_max_iterations=100
